// COMSOL Multiphysics 6.1.0.357 model "testModel.mph"
// Outline of the model tree

Parameters
  atip = 1.8 [µm]
  d = 500 [µm]
  f = F/R/T
  F = 96500 [C/mol]
  R = 8.314 [J/mol/K]
  T = 293 [K]
  Etip = -0.4[V]
  EO2 = 0.2 [V]
  O20 = 0[mmol/L]
  ksc = 0.015 [cm/s]
  ksd = 1E12 [cm*L/(s*mol)]
  al = 0.5
  Sub0 = 10 [mmol/L]
  x = 1 [um]
  re = 5.22 [nm]

Selections
  sel1: Explicit on boundaries 1, 3, 5-8 | groupcontang = on
  int1: Intersection | entitydim = 1; input = {geom1_c1_bnd, geom1_c2_bnd}
  dif1: Difference | entitydim = 1; add = {int1}; subtract = {sel1}

Geometry
  geom1 "Geometry 1" (2D axisymmetric, length unit µm)
    r1: Rectangle | pos = {0, 450}; size = {25, 100}
    r2: Rectangle | pos = {0, d}; size = {10*atip, 1000-d}
    co1: Compose | input = r1, r2; formula = r1-r2
    r3: Rectangle | pos = {0, d-14}; size = {atip, 14}
    c1: Circle | pos = {0, d-re-x}; rot = 270; r = 0.00522; angle = 180
    c2: Circle | pos = {0, d-re-x}; rot = 60; r = 0.00522; angle = 32
    fin: Finalize "Form Union"

Physics
  tds: DilutedSpecies "Transport of Diluted Species" on domains 1, 2
    dependent variable O2 = {O2, Sub, prod}
    MassConsistentStabilization.glim_mass = (0.1[mol/m^3])/tds.helem
    AdvancedSettings.BackCompState = 0
    TransportMechanism.Convection = 0
    TransportMechanism.VolatilizationInPartiallySaturatedPorousMedia = 1
    cdm1: ConvectionDiffusionMigration "Transport Properties 1" (default)
      D_O2 = 1.76*(10^-9)
      D_Sub = 1.71*(10^-9)
      D_prod = 1.71*(10^-9)
    axi1: AxialSymmetry (default)
    nflx1: NoFlux (default) | IncludeConvection = 1
    init1: init "Initial Values 1" (default) | initc = {O20, Sub0, 0}
    fl1: Fluxes "Flux 1" on boundaries 9
      species = {1, 0, 1}
      N0 = {ksc*(prod*exp(al*f*(Etip-EO2))-O2*exp(-al*f*(Etip-EO2))), -ksc*(prod*exp(al*f*(Etip-Echa))-cha*exp(-al*f*(Etip-Echa))), -ksc*(prod*exp(al*f*(Etip-EO2))-O2*exp(-al*f*(Etip-EO2)))}
    fl2: Fluxes "Flux 2" on boundaries 16 | species = {1, 1, 0}; N0 = {ksd*Sub*Sub, -2*ksd*Sub*Sub, 0}

Mesh
  mesh1 "Mesh 1"
    size: MeshSizeDefault | table = cfd; hauto = 1
    ftri1: FreeTri "Free Triangular 1" on remaining entities
      size1: Size on domains 2 | table = cfd; hnarrow = 6; custom = on
      size2: Size on domains 1 | table = cfd

Studies
  std1 "Study 1"
    time: Transient "Time Dependent" | tunit = µs; tlist = 7000

Solver configurations
  sol1 "Solution 1" (study std1)
    v1: Variables "Dependent Variables 1.1"
    t1: Time "Time-Dependent Solver 1.1" | tunit = µs; tlist = 7000; rtol = 0.005; maxorder = 2; stabcntrl = on
      fc1: FullyCoupled
        linsolver = d1
        maxiter = 8
        damp = 0.9
        jtech = once
        stabacc = aacc
        aaccdim = 5
        aaccmix = 0.9
        aaccdelay = 1
      d1: Direct "Direct, concentrations (tds)" | linsolver = pardiso; pivotperturb = 1.0E-13

Datasets
  dset1: Solution | solution = sol1
  rev1: Revolve2D "Revolution 2D 1" | data = dset1; startangle = -90; revangle = 225

Derived values
  int1: IntLine "Line Integration 1" on boundaries 9
    data = dset1
    table = tbl1
    expr = (tds.ndflux_prod)*96500[C/mol]
    unit = A
    intsurface = on

Tables
  tbl1: Table
    // Line Integration 1
    Time (µs) | (tds.ndflux_prod)*96500[C/mol] (A)
    0 | -4.1319e-69
    7000 | -8.15238e-12

Plots
  pg1: PlotGroup2D "Concentration, O2 (tds)" | data = dset1; prefixintitle = Species O2:
    surf1: Surface | expr = O2
    str1: Streamline | expr = {tds.tflux_O2r, tds.tflux_O2z}; pointtype = arrow; arrowlength = logarithmic
  pg2: PlotGroup3D "Concentration, O2, 3D (tds)" | data = rev1; prefixintitle = Species O2:; typeintitle = off
    surf1: Surface | expr = O2
  pg3: PlotGroup2D "Concentration, Sub (tds)" | data = dset1; prefixintitle = Species Sub:
    surf1: Surface | expr = Sub
    str1: Streamline | expr = {tds.tflux_Subr, tds.tflux_Subz}; pointtype = arrow; arrowlength = logarithmic
  pg4: PlotGroup3D "Concentration, Sub, 3D (tds)" | data = rev1; prefixintitle = Species Sub:; typeintitle = off
    surf1: Surface | expr = Sub
  pg5: PlotGroup2D "Concentration, prod (tds)" | data = dset1; prefixintitle = Species prod:
    surf1: Surface | expr = prod
    str1: Streamline | expr = {tds.tflux_prodr, tds.tflux_prodz}; pointtype = arrow; arrowlength = logarithmic
  pg6: PlotGroup3D "Concentration, prod, 3D (tds)" | data = rev1; prefixintitle = Species prod:; typeintitle = off
    surf1: Surface | expr = prod